*Heading
** Job name: all_hex8 Model name: All_hex8
** Generated by: Abaqus/CAE 2021.HF4
*Preprint, echo=NO, model=NO, history=NO, contact=NO
**
** PARTS
**
*Part, name=Part-1
*Node
      1,  -16.0499992,         -10.,          20.
      2,  -16.0499992,          20.,          20.
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*Element, type=C3D8R
    1,   166,    12,    11,   165,  1216,  1062,  1061,  1215
    2,    62,   247,   165,    63,  1112,  1297,  1215,  1113
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*Nset, nset=Set-1, generate
     1,  14700,      1
*Elset, elset=Set-1, generate
     1,  12818,      1
*Elset, elset=_short_S1, internal, generate
 211,  410,    1
*Surface, type=ELEMENT, name=short
_short_S1, S1
** Section: Section-1
*Solid Section, elset=Set-1, material=Material-1
,
*End Part
**
**
** ASSEMBLY
**
*Assembly, name=Assembly
**
*Instance, name=Part-1-1, part=Part-1
*End Instance
**
*Elset, elset=_Surf-1_S4, internal, instance=Part-1-1
   451,   978,  1437,  1964,  2423,  2950
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*Surface, type=ELEMENT, name=Surf-1
_Surf-1_S4, S4
*Elset, elset=_Surf-2_S5, internal, instance=Part-1-1
     3,    21,    27,    29,    31,    32
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*Elset, elset=_Surf-2_S3, internal, instance=Part-1-1
    73,    77,  1059,  1063,  2045,  2049
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*Surface, type=ELEMENT, name=Surf-2
_Surf-2_S5, S5
_Surf-2_S3, S3
*End Assembly
**
** MATERIALS
**
*Material, name=Material-1
*Density
 1e-05,
*Elastic
 1e+07, 0.3
** ----------------------------------------------------------------
**
** STEP: Step-1
**
*Step, name=Step-1, nlgeom=NO
*Static
1., 1., 1e-05, 1.
**
** LOADS
**
** Name: Load-1   Type: Pressure
*Dsload
Surf-1, P, 1.
** Name: Load-2   Type: Pressure
*Dsload
Part-1-1.short, P, 3.5
** Name: Load-3   Type: Pressure
*Dsload
Surf-2, P, 5.7
**
** OUTPUT REQUESTS
**
*Restart, write, frequency=0
**
** FIELD OUTPUT: F-Output-1
**
*Output, field, variable=PRESELECT
**
** HISTORY OUTPUT: H-Output-1
**
*Output, history, variable=PRESELECT
*End Step
